# OpenSim document version 40500
Model SUBJ10opt3D_weighted2kg:
  gravity: 0 -9.80665 0
  length_units: meters
  force_units: N
  credits:
    A reduced 3D gait model with 14 degrees of freedom and 22 muscles (based on planar gait9dof18 by Ajay Seth). Adjusted by Carmichael Ong to follow muscle strengths of Handsfield/Rajagopal and changed hamstrings to follow semimembranosus and to adjust passive curves of hamstrings, rect_fem, and vasti. Closely based on Delp S.L., Loan J.P., Hoy M.G., Zajac F.E., Topp E.L., Rosen J.M., Thelen D.G., Anderson F.C., Seth A. Notes: 3D, 23 DOF gait model created by D.G. Thelen, Univ. of Wisconsin-Madison, and Ajay Seth, Frank C. Anderson, and Scott L. Delp, Stanford University. Lower extremity joint defintions based on Delp et al. (1990). Low back joint and anthropometry based on Anderson and Pandy (1999, 2001). Planar knee model of Yamaguchi and Zajac (1989). Seth replaced tibia translation constraints with a CustomJoint for the knee and removed the patella to eliminate all kinematic constraints; insertions of the quadrucepts are handled with moving points in the tibia frame as defined by Delp 1990. Number of muscles was reduced by Anderson to improve simulation speed for demonstrations and is not intended to be used in research. License: Creative Commons (CCBY 3.0). You are free to distribute, remix, tweak, and build upon this work, even commercially, as long as you credit us for the original creation. http://creativecommons.org/licenses/by/3.0/ More Information: http://simtk-confluence.stanford.edu:8080/display/OpenSim/Gait+2392+and+2354+Models
  publications:
    Delp, S.L., Loan, J.P., Hoy, M.G., Zajac, F.E., Topp E.L., Rosen, J.M.: An interactive graphics-based model of the lower extremity to study orthopaedic surgical procedures, IEEE Transactions on Biomedical Engineering, vol. 37, pp. 757-767, 1990. Yamaguchi G.T., Zajac F.E.: A planar model of the knee joint to characterize the knee extensor mechanism." J . Biomech. vol. 22. pp. 1-10. 1989. Anderson F.C., Pandy M.G.: A dynamic optimization solution for vertical jumping in three dimensions. Computer Methods in Biomechanics and Biomedical Engineering 2:201-231, 1999. Anderson F.C., Pandy M.G.: Dynamic optimization of human walking. Journal of Biomechanical Engineering 123:381-390, 2001.
  Ground
  BodySet:
    Body pelvis: mass=7.876444 [kg] mass_center=(-0.0743214 0 0) inertia=(0.0676857 0.0676857 0.03715273 0 0 0)
        meshes=(sacrum.vtp pelvis.vtp l_pelvis.vtp)
    Body femur_r: mass=6.220766 mass_center=(0 -0.1516797 0) inertia=(0.07747308 0.03105256 0.07747308 0 0 0)
        meshes=femur_r.vtp
    Body tibia_r: mass=2.479572 mass_center=(0 -0.165456 0) inertia=(0.02637382 0.00248052 0.02637382 0 0 0)
        meshes=(tibia_r.vtp fibula_r.vtp)
    Body talus_r: mass=0.06687989 mass_center=(0 0 0) inertia=(0.0007215352 0.0006223328 0.0006223328 0 0 0)
        meshes=talus_rv.vtp
    Body calcn_r: mass=0.8359986 mass_center=(0.08844173 0.03347407 0)
        inertia=(0.001010149 0.002179092 0.002179092 0 0 0) meshes=foot.vtp
    Body toes_r: mass=0.1448618 mass_center=(0.03060084 0.006694815 -0.01692048)
        inertia=(7.215352e-5 0.0001145463 0.0001145463 0 0 0) meshes=bofoot.vtp
    Body femur_l: mass=6.220766 mass_center=(0 -0.1516797 0) inertia=(0.07747308 0.03105256 0.07747308 0 0 0)
        meshes=femur_l.vtp
    Body tibia_l: mass=2.479572 mass_center=(0 -0.165456 0) inertia=(0.02637382 0.00248052 0.02637382 0 0 0)
        meshes=(tibia_l.vtp fibula_l.vtp)
    Body talus_l: mass=0.06687989 mass_center=(0 0 0) inertia=(0.0007215352 0.0006223328 0.0006223328 0 0 0)
        meshes=talus_lv.vtp
    Body calcn_l: mass=0.8359986 mass_center=(0.08844173 0.03347407 0)
        inertia=(0.001010149 0.002179092 0.002179092 0 0 0) meshes=l_foot.vtp
    Body toes_l: mass=0.1448618 mass_center=(0.03060084 0.006694815 0.01692048)
        inertia=(7.215352e-5 0.0001145463 0.0001145463 0 0 0) meshes=l_bofoot.vtp
    Body torso: mass=22.8974 mass_center=(-0.03302141 0.3004065 0) inertia=(0.9094221 0.5259833 0.9094221 0 0 0)
        meshes=(hat_spine.vtp hat_jaw.vtp hat_skull.vtp hat_ribs_scap.vtp)
    Body weights_right: mass=2 mass_center=(0 0 0) inertia=(0.009994973 0.008983818 0.005997179 0 0 0)
      Sphere weights_right_geom_1: radius=0.02
    Body weights_left: mass=2 mass_center=(0 0 0) inertia=(0.009994973 0.008983818 0.005997179 0 0 0)
      Sphere weights_left_geom_1: radius=0.02
  JointSet:
    CustomJoint ground_pelvis: socket_parent_frame=ground_offset socket_child_frame=pelvis_offset
      Coordinate pelvis_tilt: default_value=0 range=(-1.570796 1.570796) clamped=false
      Coordinate pelvis_list: default_value=0 range=(-1.570796 1.570796) clamped=false
      Coordinate pelvis_rotation: default_value=0 range=(-1.570796 1.570796) clamped=false
      Coordinate pelvis_tx: default_value=0 range=(-5 5) clamped=false
      Coordinate pelvis_ty: default_value=0 range=(-1 2) clamped=false
      Coordinate pelvis_tz: default_value=0 range=(-3 3) clamped=false
      PhysicalOffsetFrame ground_offset: socket_parent=/ground translation=(0 0 0) [meters]
      PhysicalOffsetFrame pelvis_offset: socket_parent=/bodyset/pelvis translation=(0 0 0)
      SpatialTransform:
        TransformAxis rotation1: coordinates=pelvis_tilt axis=(0 0 1) LinearFunction(coefficients=1 0)
        TransformAxis rotation2: coordinates=pelvis_list axis=(1 0 0) LinearFunction(coefficients=1 0)
        TransformAxis rotation3: coordinates=pelvis_rotation axis=(0 1 0) LinearFunction(coefficients=1 0)
        TransformAxis translation1: coordinates=pelvis_tx axis=(1 0 0) LinearFunction(coefficients=1 0)
        TransformAxis translation2: coordinates=pelvis_ty axis=(0 1 0) LinearFunction(coefficients=1 0)
        TransformAxis translation3: coordinates=pelvis_tz axis=(0 0 1) LinearFunction(coefficients=1 0)
    CustomJoint hip_r: socket_parent_frame=pelvis_offset socket_child_frame=femur_r_offset
      Coordinate hip_flexion_r: default_value=0 range=(-2.094395 2.094395) clamped=false
      Coordinate hip_adduction_r: default_value=0 range=(-2.094395 2.094395) clamped=false
      Coordinate hip_rotation_r: default_value=0 range=(-2.094395 2.094395) clamped=false
      PhysicalOffsetFrame pelvis_offset: socket_parent=/bodyset/pelvis translation=(-0.0743214 -0.06032865 0.08326174)
      PhysicalOffsetFrame femur_r_offset: socket_parent=/bodyset/femur_r translation=(0 0 0)
      SpatialTransform: axes_held_at_zero=(translation1 translation2 translation3)
        TransformAxis rotation1: coordinates=hip_flexion_r axis=(0 0 1) LinearFunction(coefficients=1 0)
        TransformAxis rotation2: coordinates=hip_adduction_r axis=(1 0 0) LinearFunction(coefficients=1 0)
        TransformAxis rotation3: coordinates=hip_rotation_r axis=(0 1 0) LinearFunction(coefficients=1 0)
    CustomJoint knee_r: socket_parent_frame=femur_r_offset socket_child_frame=tibia_r_offset
      Coordinate knee_angle_r: default_value=0 range=(-2.094395 0.1745329) clamped=false
      PhysicalOffsetFrame femur_r_offset: socket_parent=/bodyset/femur_r translation=(0 0 0)
      PhysicalOffsetFrame tibia_r_offset: socket_parent=/bodyset/tibia_r translation=(0 0 0)
      SpatialTransform: axes_held_at_zero=(rotation2 rotation3 translation3)
        TransformAxis rotation1: coordinates=knee_angle_r axis=(0 0 1) LinearFunction(coefficients=1 0)
        TransformAxis translation1: coordinates=knee_angle_r axis=(1 0 0)
          MultiplierFunction: scale=1.150131
            PolynomialFunction: coefficients=(0.001301285 0.007876353 0.00756839 -0.007330729 -0.004336294)
        TransformAxis translation2: coordinates=knee_angle_r axis=(0 1 0)
          MultiplierFunction: scale=0.8922334
            PolynomialFunction: coefficients=(0.000712275 0.001221557 -0.004999721 0.003510228 -0.3957497)
    PinJoint ankle_r: socket_parent_frame=tibia_r_offset socket_child_frame=talus_r_offset
      Coordinate ankle_angle_r: default_value=0 range=(-1.570796 1.570796) clamped=false
      PhysicalOffsetFrame tibia_r_offset: socket_parent=/bodyset/tibia_r translation=(0 -0.3810717 0)
      PhysicalOffsetFrame talus_r_offset: socket_parent=/bodyset/talus_r translation=(0 0 0)
    WeldJoint subtalar_r: socket_parent_frame=talus_r_offset socket_child_frame=calcn_r_offset
      PhysicalOffsetFrame talus_r_offset: socket_parent=/bodyset/talus_r
          translation=(-0.04313303 -0.04680791 0.007657727)
      PhysicalOffsetFrame calcn_r_offset: socket_parent=/bodyset/calcn_r translation=(0 0 0)
    PinJoint mtp_r: socket_parent_frame=calcn_r_offset socket_child_frame=toes_r_offset
      Coordinate mtp_angle_r: default_value=0 range=(-1.570796 1.570796) clamped=false
      PhysicalOffsetFrame calcn_r_offset: socket_parent=/bodyset/calcn_r
          translation=(0.1581338 -0.002231605 0.001044235)
      PhysicalOffsetFrame toes_r_offset: socket_parent=/bodyset/toes_r translation=(0 0 0)
    CustomJoint hip_l: socket_parent_frame=pelvis_offset socket_child_frame=femur_l_offset
      Coordinate hip_flexion_l: default_value=0 range=(-2.094395 2.094395) clamped=false
      Coordinate hip_adduction_l: default_value=0 range=(-2.094395 2.094395) clamped=false
      Coordinate hip_rotation_l: default_value=0 range=(-2.094395 2.094395) clamped=false
      PhysicalOffsetFrame pelvis_offset: socket_parent=/bodyset/pelvis translation=(-0.0743214 -0.06032865 -0.08326174)
      PhysicalOffsetFrame femur_l_offset: socket_parent=/bodyset/femur_l translation=(0 0 0)
      SpatialTransform: axes_held_at_zero=(translation1 translation2 translation3)
        TransformAxis rotation1: coordinates=hip_flexion_l axis=(0 0 1) LinearFunction(coefficients=1 0)
        TransformAxis rotation2: coordinates=hip_adduction_l axis=(-1 0 0) LinearFunction(coefficients=1 0)
        TransformAxis rotation3: coordinates=hip_rotation_l axis=(0 -1 0) LinearFunction(coefficients=1 0)
    CustomJoint knee_l: socket_parent_frame=femur_l_offset socket_child_frame=tibia_l_offset
      Coordinate knee_angle_l: default_value=0 range=(-2.094395 0.1745329) clamped=false
      PhysicalOffsetFrame femur_l_offset: socket_parent=/bodyset/femur_l translation=(0 0 0)
      PhysicalOffsetFrame tibia_l_offset: socket_parent=/bodyset/tibia_l translation=(0 0 0)
      SpatialTransform: axes_held_at_zero=(rotation2 rotation3 translation3)
        TransformAxis rotation1: coordinates=knee_angle_l axis=(0 0 1) LinearFunction(coefficients=1 0)
        TransformAxis translation1: coordinates=knee_angle_l axis=(1 0 0)
          MultiplierFunction: scale=1.150131
            PolynomialFunction: coefficients=(0.001301285 0.007876353 0.00756839 -0.007330729 -0.004336294)
        TransformAxis translation2: coordinates=knee_angle_l axis=(0 1 0)
          MultiplierFunction: scale=0.8922334
            PolynomialFunction: coefficients=(0.000712275 0.001221557 -0.004999721 0.003510228 -0.3957497)
    PinJoint ankle_l: socket_parent_frame=tibia_l_offset socket_child_frame=talus_l_offset
      Coordinate ankle_angle_l: default_value=0 range=(-1.570796 1.570796) clamped=false
      PhysicalOffsetFrame tibia_l_offset: socket_parent=/bodyset/tibia_l translation=(0 -0.3810717 0)
      PhysicalOffsetFrame talus_l_offset: socket_parent=/bodyset/talus_l translation=(0 0 0)
    WeldJoint subtalar_l: socket_parent_frame=talus_l_offset socket_child_frame=calcn_l_offset
      PhysicalOffsetFrame talus_l_offset: socket_parent=/bodyset/talus_l
          translation=(-0.04313303 -0.04680791 -0.007657727)
      PhysicalOffsetFrame calcn_l_offset: socket_parent=/bodyset/calcn_l translation=(0 0 0)
    PinJoint mtp_l: socket_parent_frame=calcn_l_offset socket_child_frame=toes_l_offset
      Coordinate mtp_angle_l: default_value=0 range=(-1.570796 1.570796) clamped=false
      PhysicalOffsetFrame calcn_l_offset: socket_parent=/bodyset/calcn_l
          translation=(0.1581338 -0.002231605 -0.001044235)
      PhysicalOffsetFrame toes_l_offset: socket_parent=/bodyset/toes_l translation=(0 0 0)
    CustomJoint back: socket_parent_frame=pelvis_offset socket_child_frame=torso_offset
      Coordinate lumbar_extension: default_value=0 range=(-1.570796 1.570796) clamped=true
      Coordinate lumbar_bending: default_value=0 range=(-1.570796 1.570796) clamped=true
      Coordinate lumbar_rotation: default_value=0 range=(-1.570796 1.570796) clamped=true
      PhysicalOffsetFrame pelvis_offset: socket_parent=/bodyset/pelvis translation=(-0.1022313 0.07183562 0)
      PhysicalOffsetFrame torso_offset: socket_parent=/bodyset/torso translation=(0 0 0)
      SpatialTransform: axes_held_at_zero=(translation1 translation2 translation3)
        TransformAxis rotation1: coordinates=lumbar_extension axis=(0 0 1) LinearFunction(coefficients=1 0)
        TransformAxis rotation2: coordinates=lumbar_bending axis=(1 0 0) LinearFunction(coefficients=1 0)
        TransformAxis rotation3: coordinates=lumbar_rotation axis=(0 1 0) LinearFunction(coefficients=1 0)
    WeldJoint fixed: socket_parent_frame=tibia_r_offset socket_child_frame=weights_right_offset
      PhysicalOffsetFrame tibia_r_offset: socket_parent=/bodyset/tibia_r translation=(0.02957788 -0.09986118 0)
      PhysicalOffsetFrame weights_right_offset: socket_parent=/bodyset/weights_right translation=(0 0 0)
    WeldJoint fixed_0: socket_parent_frame=tibia_l_offset socket_child_frame=weights_left_offset
      PhysicalOffsetFrame tibia_l_offset: socket_parent=/bodyset/tibia_l translation=(0.02957788 -0.09986118 0)
      PhysicalOffsetFrame weights_left_offset: socket_parent=/bodyset/weights_left translation=(0 0 0)
  ForceSet:
    DeGrooteFregly2016Muscle [values shared by the 28 below unless stated]: min_control=0.01 max_control=1
        max_contraction_velocity=10 activation_time_constant=0.015 deactivation_time_constant=0.06
        default_activation=0.01 active_force_width_scale=1 fiber_damping=0.01 tendon_strain_at_one_norm_force=0.049
        ignore_passive_fiber_force=false
    DeGrooteFregly2016Muscle ercspn_r: max_isometric_force=2500 optimal_fiber_length=0.08958125
        tendon_slack_length=0.02943903 pennation_angle_at_optimal=0 [radians]
      PathPoint P1: pelvis (-0.142129 0.03869428 0.04286677)
      PathPoint P2: torso (-0.05400155 0.0989099 0.02033077)
    DeGrooteFregly2016Muscle intobl_r: max_isometric_force=900 optimal_fiber_length=0.09225412
        tendon_slack_length=0.07933538 pennation_angle_at_optimal=0
      PathPoint P1: pelvis (-0.04060828 0.06169931 0.1137543)
      PathPoint P2: torso (0.06872925 0.1438689 0.01265401)
    DeGrooteFregly2016Muscle extobl_r: max_isometric_force=900 optimal_fiber_length=0.09544473
        tendon_slack_length=0.1137377 pennation_angle_at_optimal=0
      PathPoint P1: pelvis (-0.03045621 -0.05605823 0.009831829)
      PathPoint P2: torso (0.06382002 0.0989099 0.09279604)
    DeGrooteFregly2016Muscle abd_r: max_isometric_force=4460.29 optimal_fiber_length=0.09438699
        tendon_slack_length=0.04255157 pennation_angle_at_optimal=0
      PathPoint glut_med2_r-P1: pelvis (-0.08987949 0.0406146 0.07638143)
      PathPoint glut_med2_r-P2: femur_r (-0.02967339 -0.005174954 0.06061192)
    DeGrooteFregly2016Muscle add_r: max_isometric_force=3931.8 optimal_fiber_length=0.0877362
        tendon_slack_length=0.06717216 pennation_angle_at_optimal=0.08726646
      PathPoint add_mag1_r-P1: pelvis (-0.07694946 -0.1071495 0.02542724)
      PathPoint add_mag1_r-P2: femur_r (-0.005175591 -0.1080495 0.03898945)
    DeGrooteFregly2016Muscle hamstrings_r: max_isometric_force=2700 optimal_fiber_length=0.09803177
        tendon_slack_length=0.3101292 pennation_angle_at_optimal=0
      PathPoint bifemlh_r-P1: pelvis (-0.1278759 -0.09040709 0.06827223)
      PathPoint bifemlh_r-P2: tibia_r (-0.02481479 -0.03084235 0.02426244)
      PathPoint bifemlh_r-P3: tibia_r (-0.01929123 -0.04823393 0.02827735)
    DeGrooteFregly2016Muscle bifemsh_r: max_isometric_force=804 optimal_fiber_length=0.1545506
        tendon_slack_length=0.08162118 pennation_angle_at_optimal=0.4014257
      PathPoint P1: femur_r (0.005766448 -0.1888671 0.02698691)
      PathPoint P2: tibia_r (-0.02481479 -0.03084235 0.02426244)
      PathPoint P3: tibia_r (-0.01929123 -0.04823393 0.02827735)
    DeGrooteFregly2016Muscle glut_max_r: max_isometric_force=1944 optimal_fiber_length=0.1264783
        tendon_slack_length=0.07299484 pennation_angle_at_optimal=0
      PathPoint P1: pelvis (-0.1337028 0.007668346 0.04542302)
      PathPoint P2: pelvis (-0.1364434 -0.05367844 0.07993277)
      PathPoint P3: femur_r (-0.05189795 -0.05224946 0.0290629)
      PathPoint P4: femur_r (-0.01799127 -0.09089985 0.04832276)
    DeGrooteFregly2016Muscle iliopsoas_r: max_isometric_force=2342 optimal_fiber_length=0.08288683
        tendon_slack_length=0.1361319 pennation_angle_at_optimal=0.1396263
      PathPoint psoas_r-P1: pelvis (-0.06568393 0.07818182 0.02841399)
      PathPoint psoas_r-P2: pelvis (-0.02416192 -0.05024089 0.07462356)
      ConditionalPathPoint psoas_r-P3: pelvis (-0.02923796 -0.07095416 0.08022772)
          socket_coordinate=/jointset/hip_r/hip_flexion_r range=(-1.5708 0.785398) [radians]
      PathPoint psoas_r-P4: femur_r (0.001845259 -0.04536043 0.004382495)
      PathPoint psoas_r-P5: femur_r (-0.02168181 -0.05341257 0.01199414)
    DeGrooteFregly2016Muscle rect_fem_r: max_isometric_force=1169 optimal_fiber_length=0.1077348
        tendon_slack_length=0.2780714 pennation_angle_at_optimal=0.08726646
      PathPoint P1: pelvis (-0.02994858 -0.02741211 0.09517206)
      ConditionalPathPoint P2: femur_r (0.03851985 -0.3605569 0.002191253)
          socket_coordinate=/jointset/knee_r/knee_angle_r range=(-2.61799 -1.45997)
      MovingPathPoint P3: tibia_r socket_x_coordinate=/jointset/knee_r/knee_angle_r
          socket_y_coordinate=/jointset/knee_r/knee_angle_r socket_z_coordinate=/jointset/knee_r/knee_angle_r
        x_location: MultiplierFunction: scale=0.8244127
          SimmSpline: x=(-2.0944 -1.99997 -1.5708 -1.45752 -1.39626 -1.0472 -0.698132 -0.526391 -0.349066 -0.174533 0 0.00017453 0.00034907 0.0279253 0.0872665 0.174533 2.0944)
              y=(0.0155805 0.0179938 0.0275081 0.0296564 0.0307615 0.0365695 0.0422074 0.0450902 0.048391 0.0534299 0.0617576 0.0617669 0.0617762 0.0633083 0.066994 0.0733035 0.0573481)
        y_location: MultiplierFunction: scale=0.8567308
          SimmSpline: x=(-2.0944 -1.99997 -1.5708 -1.45752 -1.39626 -1.0472 -0.698132 -0.526391 -0.349066 -0.174533 0 0.00017453 0.00034907 0.0279253 0.0872665 0.174533 2.0944)
              y=(0.0234116 0.0237613 0.0251141 0.0252795 0.0253146 0.0249184 0.0242373 0.0238447 0.0234197 0.0227644 0.020984 0.0209814 0.0209788 0.0205225 0.0191754 0.0159554 -0.0673774)
        z_location: MultiplierFunction: scale=0.8244127
          SimmSpline: x=(-2.0944 0.1745) y=(0.0014 0.0014)
    DeGrooteFregly2016Muscle vasti_r: max_isometric_force=5000 optimal_fiber_length=0.09961455
        tendon_slack_length=0.1049794 pennation_angle_at_optimal=0.05235988
      PathPoint vas_int_r-P1: femur_r (0.03344536 -0.1721368 0.03575194)
      PathPoint vas_int_r-P2: femur_r (0.03863521 -0.1864518 0.03286868)
      ConditionalPathPoint vas_int_r-P3: femur_r (0.03955784 -0.3605569 0.006343089)
          socket_coordinate=/jointset/knee_r/knee_angle_r range=(-2.61799 -1.42)
      MovingPathPoint vas_int_r-P4: tibia_r socket_x_coordinate=/jointset/knee_r/knee_angle_r
          socket_y_coordinate=/jointset/knee_r/knee_angle_r socket_z_coordinate=/jointset/knee_r/knee_angle_r
        x_location: MultiplierFunction: scale=0.8244127
          SimmSpline: x=(-2.0944 -1.99997 -1.5708 -1.45752 -1.39626 -1.0472 -0.698132 -0.526391 -0.349066 -0.174533 0 0.00017453 0.00034907 0.0279253 0.0872665 0.174533 2.0944)
              y=(0.0082733 0.0106866 0.0202042 0.022353 0.0234583 0.0292715 0.0349465 0.037871 0.0412569 0.0465287 0.0554632 0.0554735 0.0554837 0.0571717 0.061272 0.0684368 0.0648818)
        y_location: MultiplierFunction: scale=0.8567308
          SimmSpline: x=(-2.0944 -1.99997 -1.5708 -1.45752 -1.39626 -1.0472 -0.698132 -0.526391 -0.349066 -0.174533 0 0.00017453 0.00034907 0.0279253 0.0872665 0.174533 2.0944)
              y=(0.025599 0.0259487 0.0273124 0.0274796 0.0275151 0.0271363 0.0265737 0.0263073 0.0261187 0.0260129 0.0252923 0.0252911 0.0252898 0.0250526 0.0242191 0.0218288 -0.0685706)
        z_location: MultiplierFunction: scale=0.8244127
          SimmSpline: x=(-2.0944 2.0944) y=(0.0018 0.0018)
    DeGrooteFregly2016Muscle gastroc_r: max_isometric_force=2500 optimal_fiber_length=0.07530671
        tendon_slack_length=0.3339248 pennation_angle_at_optimal=0.296706
      PathPoint med_gas_r-P1: femur_r (-0.02191253 -0.3515212 -0.02710227)
      ConditionalPathPoint med_gas_r-P2: femur_r (-0.03459871 -0.3598413 -0.02975482)
          socket_coordinate=/jointset/knee_r/knee_angle_r range=(-0.785398 0.174533)
      PathPoint med_gas_r-P3: calcn_r (0 0.03161258 -0.004683396)
    DeGrooteFregly2016Muscle soleus_r: max_isometric_force=5137 optimal_fiber_length=0.05077715
        tendon_slack_length=0.2186829 pennation_angle_at_optimal=0.4363323
      PathPoint P1: tibia_r (-0.001978593 -0.1313368 0.005853332)
      PathPoint P2: calcn_r (0 0.03161258 -0.004683396)
    DeGrooteFregly2016Muscle tib_ant_r: max_isometric_force=3000 optimal_fiber_length=0.07343069
        tendon_slack_length=0.2318623 pennation_angle_at_optimal=0.08726646
      PathPoint P1: tibia_r (0.01475698 -0.1391328 0.009480729)
      PathPoint P2: tibia_r (0.02712319 -0.3384945 -0.01459214)
      PathPoint P3: calcn_r (0.09424705 0.01815176 -0.02695162)
    DeGrooteFregly2016Muscle ercspn_l: max_isometric_force=2500 optimal_fiber_length=0.08958125
        tendon_slack_length=0.02943903 pennation_angle_at_optimal=0
      PathPoint P1: pelvis (-0.142129 0.03869428 -0.04286677)
      PathPoint P2: torso (-0.05400155 0.0989099 -0.02033077)
    DeGrooteFregly2016Muscle intobl_l: max_isometric_force=900 optimal_fiber_length=0.09225412
        tendon_slack_length=0.07933538 pennation_angle_at_optimal=0
      PathPoint P1: pelvis (-0.04060828 0.06169931 -0.1137543)
      PathPoint P2: torso (0.06872925 0.1438689 -0.01265401)
    DeGrooteFregly2016Muscle extobl_l: max_isometric_force=900 optimal_fiber_length=0.09544473
        tendon_slack_length=0.1137377 pennation_angle_at_optimal=0
      PathPoint P1: pelvis (-0.03045621 -0.05605823 -0.009831829)
      PathPoint P2: torso (0.06382002 0.0989099 -0.09279604)
    DeGrooteFregly2016Muscle abd_l: max_isometric_force=4460.29 optimal_fiber_length=0.09438699
        tendon_slack_length=0.04255157 pennation_angle_at_optimal=0
      PathPoint glut_med2_l-P1: pelvis (-0.08987949 0.0406146 -0.07638143)
      PathPoint glut_med2_l-P2: femur_l (-0.02967339 -0.005174954 -0.06061192)
    DeGrooteFregly2016Muscle add_l: max_isometric_force=3931.8 optimal_fiber_length=0.0877362
        tendon_slack_length=0.06717216 pennation_angle_at_optimal=0.08726646
      PathPoint add_mag1_l-P1: pelvis (-0.07694946 -0.1071495 -0.02542724)
      PathPoint add_mag1_l-P2: femur_l (-0.005175591 -0.1080495 -0.03898945)
    DeGrooteFregly2016Muscle hamstrings_l: max_isometric_force=2700 optimal_fiber_length=0.09803177
        tendon_slack_length=0.3101292 pennation_angle_at_optimal=0
      PathPoint bifemlh_l-P1: pelvis (-0.1278759 -0.09040709 -0.06827223)
      PathPoint bifemlh_l-P2: tibia_l (-0.02481479 -0.03084235 -0.02426244)
      PathPoint bifemlh_l-P3: tibia_l (-0.01929123 -0.04823393 -0.02827735)
    DeGrooteFregly2016Muscle bifemsh_l: max_isometric_force=804 optimal_fiber_length=0.1545506
        tendon_slack_length=0.08162118 pennation_angle_at_optimal=0.4014257
      PathPoint P1: femur_l (0.005766448 -0.1888671 -0.02698691)
      PathPoint P2: tibia_l (-0.02481479 -0.03084235 -0.02426244)
      PathPoint P3: tibia_l (-0.01929123 -0.04823393 -0.02827735)
    DeGrooteFregly2016Muscle glut_max_l: max_isometric_force=1944 optimal_fiber_length=0.1264783
        tendon_slack_length=0.07299484 pennation_angle_at_optimal=0
      PathPoint P1: pelvis (-0.1337028 0.007668346 -0.04542302)
      PathPoint P2: pelvis (-0.1364434 -0.05367844 -0.07993277)
      PathPoint P3: femur_l (-0.05189795 -0.05224946 -0.0290629)
      PathPoint P4: femur_l (-0.01799127 -0.09089985 -0.04832276)
    DeGrooteFregly2016Muscle iliopsoas_l: max_isometric_force=2342 optimal_fiber_length=0.08288683
        tendon_slack_length=0.1361319 pennation_angle_at_optimal=0.1396263
      PathPoint psoas_l-P1: pelvis (-0.06568393 0.07818182 -0.02841399)
      PathPoint psoas_l-P2: pelvis (-0.02416192 -0.05024089 -0.07462356)
      ConditionalPathPoint psoas_l-P3: pelvis (-0.02923796 -0.07095416 -0.08022772)
          socket_coordinate=/jointset/hip_l/hip_flexion_l range=(-1.5708 0.785398)
      PathPoint psoas_l-P4: femur_l (0.001845259 -0.04536043 -0.004382495)
      PathPoint psoas_l-P5: femur_l (-0.02168181 -0.05341257 -0.01199414)
    DeGrooteFregly2016Muscle rect_fem_l: max_isometric_force=1169 optimal_fiber_length=0.1077348
        tendon_slack_length=0.2780714 pennation_angle_at_optimal=0.08726646
      PathPoint P1: pelvis (-0.02994858 -0.02741211 -0.09517206)
      ConditionalPathPoint P2: femur_l (0.03851985 -0.3605569 -0.002191253)
          socket_coordinate=/jointset/knee_l/knee_angle_l range=(-2.61799 -1.45997)
      MovingPathPoint P3: tibia_l socket_x_coordinate=/jointset/knee_l/knee_angle_l
          socket_y_coordinate=/jointset/knee_l/knee_angle_l socket_z_coordinate=/jointset/knee_l/knee_angle_l
        x_location: MultiplierFunction: scale=0.8244127
          SimmSpline: x=(-2.0944 -1.99997 -1.5708 -1.45752 -1.39626 -1.0472 -0.698132 -0.526391 -0.349066 -0.174533 0 0.00017453 0.00034907 0.0279253 0.0872665 0.174533 2.0944)
              y=(0.0155805 0.0179938 0.0275081 0.0296564 0.0307615 0.0365695 0.0422074 0.0450902 0.048391 0.0534299 0.0617576 0.0617669 0.0617762 0.0633083 0.066994 0.0733035 0.0573481)
        y_location: MultiplierFunction: scale=0.8567308
          SimmSpline: x=(-2.0944 -1.99997 -1.5708 -1.45752 -1.39626 -1.0472 -0.698132 -0.526391 -0.349066 -0.174533 0 0.00017453 0.00034907 0.0279253 0.0872665 0.174533 2.0944)
              y=(0.0234116 0.0237613 0.0251141 0.0252795 0.0253146 0.0249184 0.0242373 0.0238447 0.0234197 0.0227644 0.020984 0.0209814 0.0209788 0.0205225 0.0191754 0.0159554 -0.0673774)
        z_location: MultiplierFunction: scale=0.8244127
          SimmSpline: x=(-2.0944 0.1745) y=(-0.0014 -0.0014)
    DeGrooteFregly2016Muscle vasti_l: max_isometric_force=5000 optimal_fiber_length=0.09961455
        tendon_slack_length=0.1049794 pennation_angle_at_optimal=0.05235988
      PathPoint vas_int_l-P1: femur_l (0.03344536 -0.1721368 -0.03575194)
      PathPoint vas_int_l-P2: femur_l (0.03863521 -0.1864518 -0.03286868)
      ConditionalPathPoint vas_int_l-P3: femur_l (0.03955784 -0.3605569 -0.006343089)
          socket_coordinate=/jointset/knee_l/knee_angle_l range=(-2.61799 -1.42)
      MovingPathPoint vas_int_l-P4: tibia_l socket_x_coordinate=/jointset/knee_l/knee_angle_l
          socket_y_coordinate=/jointset/knee_l/knee_angle_l socket_z_coordinate=/jointset/knee_l/knee_angle_l
        x_location: MultiplierFunction: scale=0.8244127
          SimmSpline: x=(-2.0944 -1.99997 -1.5708 -1.45752 -1.39626 -1.0472 -0.698132 -0.526391 -0.349066 -0.174533 0 0.00017453 0.00034907 0.0279253 0.0872665 0.174533 2.0944)
              y=(0.0082733 0.0106866 0.0202042 0.022353 0.0234583 0.0292715 0.0349465 0.037871 0.0412569 0.0465287 0.0554632 0.0554735 0.0554837 0.0571717 0.061272 0.0684368 0.0648818)
        y_location: MultiplierFunction: scale=0.8567308
          SimmSpline: x=(-2.0944 -1.99997 -1.5708 -1.45752 -1.39626 -1.0472 -0.698132 -0.526391 -0.349066 -0.174533 0 0.00017453 0.00034907 0.0279253 0.0872665 0.174533 2.0944)
              y=(0.025599 0.0259487 0.0273124 0.0274796 0.0275151 0.0271363 0.0265737 0.0263073 0.0261187 0.0260129 0.0252923 0.0252911 0.0252898 0.0250526 0.0242191 0.0218288 -0.0685706)
        z_location: MultiplierFunction: scale=0.8244127
          SimmSpline: x=(-2.0944 2.0944) y=(-0.0018 -0.0018)
    DeGrooteFregly2016Muscle gastroc_l: max_isometric_force=2500 optimal_fiber_length=0.07530671
        tendon_slack_length=0.3339248 pennation_angle_at_optimal=0.296706
      PathPoint med_gas_l-P1: femur_l (-0.02191253 -0.3515212 0.02710227)
      ConditionalPathPoint med_gas_l-P2: femur_l (-0.03459871 -0.3598413 0.02975482)
          socket_coordinate=/jointset/knee_l/knee_angle_l range=(-0.785398 0.174533)
      PathPoint med_gas_l-P3: calcn_l (0 0.03161258 0.004683396)
    DeGrooteFregly2016Muscle soleus_l: max_isometric_force=5137 optimal_fiber_length=0.05077715
        tendon_slack_length=0.2186829 pennation_angle_at_optimal=0.4363323
      PathPoint P1: tibia_l (-0.001978593 -0.1313368 -0.005853332)
      PathPoint P2: calcn_l (0 0.03161258 0.004683396)
    DeGrooteFregly2016Muscle tib_ant_l: max_isometric_force=3000 optimal_fiber_length=0.07343069
        tendon_slack_length=0.2318623 pennation_angle_at_optimal=0.08726646
      PathPoint P1: tibia_l (0.01475698 -0.1391328 -0.009480729)
      PathPoint P2: tibia_l (0.02712319 -0.3384945 0.01459214)
      PathPoint P3: calcn_l (0.09424705 0.01815176 0.02695162)
    SmoothSphereHalfSpaceForce [values shared by the 12 below unless stated]: socket_half_space=/contactgeometryset/floor
        stiffness=1000000 [N/m^2] dissipation=2 [s/m] static_friction=0.8 dynamic_friction=0.8 viscous_friction=0.5
        transition_velocity=0.2 [m/s]
    SmoothSphereHalfSpaceForce SmoothSphereHalfSpaceForce_s1_r: socket_sphere=/contactgeometryset/s1_r
    SmoothSphereHalfSpaceForce SmoothSphereHalfSpaceForce_s2_r: socket_sphere=/contactgeometryset/s2_r
    SmoothSphereHalfSpaceForce SmoothSphereHalfSpaceForce_s3_r: socket_sphere=/contactgeometryset/s3_r
    SmoothSphereHalfSpaceForce SmoothSphereHalfSpaceForce_s4_r: socket_sphere=/contactgeometryset/s4_r
    SmoothSphereHalfSpaceForce SmoothSphereHalfSpaceForce_s5_r: socket_sphere=/contactgeometryset/s5_r
    SmoothSphereHalfSpaceForce SmoothSphereHalfSpaceForce_s6_r: socket_sphere=/contactgeometryset/s6_r
    SmoothSphereHalfSpaceForce SmoothSphereHalfSpaceForce_s1_l: socket_sphere=/contactgeometryset/s1_l
    SmoothSphereHalfSpaceForce SmoothSphereHalfSpaceForce_s2_l: socket_sphere=/contactgeometryset/s2_l
    SmoothSphereHalfSpaceForce SmoothSphereHalfSpaceForce_s3_l: socket_sphere=/contactgeometryset/s3_l
    SmoothSphereHalfSpaceForce SmoothSphereHalfSpaceForce_s4_l: socket_sphere=/contactgeometryset/s4_l
    SmoothSphereHalfSpaceForce SmoothSphereHalfSpaceForce_s5_l: socket_sphere=/contactgeometryset/s5_l
    SmoothSphereHalfSpaceForce SmoothSphereHalfSpaceForce_s6_l: socket_sphere=/contactgeometryset/s6_l
  MarkerSet:
    Marker RSHO: torso (-0.01326661 0.3634552 0.180671)
    Marker LSHO: torso (-0.03604452 0.3741669 -0.171795)
    Marker C7: torso (-0.08639783 0.4239042 0.007172558)
    Marker CLAV: torso (0.04496584 0.3655108 -0.0001465253)
    Marker RASI: pelvis (0.005768353 0.02686406 0.1242578)
    Marker LASI: pelvis (0.005413511 0.01505085 -0.121083)
    Marker RPSI: pelvis (-0.1666384 0.05396316 0.07739858)
    Marker LPSI: pelvis (-0.1625878 0.05855777 -0.0817634)
    Marker RTHI3: femur_r (0.01286398 -0.2015756 0.07932765)
    Marker RTHI2: femur_r (0.0874933 -0.2109591 2.599585e-5)
    Marker RTHI: femur_r (0.006098083 -0.269146 0.07076156)
    Marker RKNE: femur_r (0.005750656 -0.3604623 0.05750656) fixed=true
    Marker RKNEmed: femur_r (0.005750656 -0.3604623 -0.05750656) fixed=true
    Marker RTIB3: tibia_r (-0.03928195 -0.2478021 0.0577182)
    Marker RTIB2: tibia_r (0.02352833 -0.2511367 0.02160509)
    Marker RTIB: tibia_r (-0.02668808 -0.30891 0.04437368)
    Marker RANK: tibia_r (-0.004263915 -0.362284 0.0451975) fixed=true
    Marker RANKmed: tibia_r (0.005116698 -0.3534218 -0.03240575) fixed=true
    Marker RHEE: calcn_r (-0.02211043 0.02231605 -0.004834423) fixed=true
    Marker RTOE: calcn_r (0.1560125 0.02201568 -0.02900654) fixed=true
    Marker RMT5: calcn_r (0.1282405 0.01663662 0.04127211) fixed=true
    Marker LTHI3: femur_l (0.02101529 -0.213792 -0.07146295)
    Marker LTHI2: femur_l (0.08813843 -0.2093228 0.01018943)
    Marker LTHI: femur_l (0.0156629 -0.2769781 -0.06358208)
    Marker LKNE: femur_l (0 -0.3604623 -0.05750656) fixed=true
    Marker LKNEmed: femur_l (0 -0.3604623 0.05750656) fixed=true
    Marker LTIB3: tibia_l (-0.02988772 -0.2577669 -0.06485111)
    Marker LTIB2: tibia_l (0.02613503 -0.2366327 -0.02443733)
    Marker LTIB: tibia_l (-0.01704083 -0.3089003 -0.05409312)
    Marker LANK: tibia_l (-0.004263915 -0.362284 -0.0451975) fixed=true
    Marker LANKmed: tibia_l (0.005116698 -0.3534218 0.03240575) fixed=true
    Marker LHEE: calcn_l (-0.02211043 0.02231605 0.004834423) fixed=true
    Marker LTOE: calcn_l (0.1560121 0.02201568 0.02900654) fixed=true
    Marker LMT5: calcn_l (0.1282405 0.01663661 -0.04127215) fixed=true
    Marker LFHD: torso (-0.06959078 0.5468721 -0.07129621)
    Marker RFHD: torso (-0.0674549 0.5550429 0.07370997)
    Marker RBHD: torso (0.02247005 0.6491687 0.05620199)
    Marker LBHD: torso (0.01985349 0.6420215 -0.06428663)
    Marker STRN: torso (0.1244348 0.1694013 -0.00833562)
    Marker SACR: pelvis (-0.1654948 0.06514544 0.003204039)
    Marker T10: torso (-0.078609 0.1214995 -0.0005319341)
    Marker RBAK: torso (-0.1218071 0.2734855 0.0897927)
    Marker RHJC: femur_r (0 0 0) fixed=true
    Marker LHJC: femur_l (0 0 0) fixed=true
    Marker RKJC: tibia_r (0.001476167 -0.002117163 -0.007207722) fixed=true
    Marker LKJC: tibia_l (0.001476167 -0.002117163 0.007207722) fixed=true
    Marker RAJC: talus_r (0 0 0) fixed=true
    Marker LAJC: talus_l (0 0 0) fixed=true
    Marker RSJC: torso (0.003472752 0.3487531 0.1607743) fixed=true
    Marker LSJC: torso (0.003472752 0.3487531 -0.1607743) fixed=true
    Marker midHJC: pelvis (-0.05918381 -0.07164597 0) fixed=true
    Marker midASI: pelvis (0.01001864 0.01650285 0) fixed=true
    Marker midPSI: pelvis (-0.1629394 0.03194406 0) fixed=true
    Marker midPelvis: pelvis (-0.07646039 0.02422346 0) fixed=true
    Marker RHEEproj: calcn_r (-0.02211043 -0.01502778 -0.004834423) fixed=true
    Marker RTOEproj: calcn_r (0.1560125 -0.01502778 -0.02900654) fixed=true
    Marker RMT5proj: calcn_r (0.1282405 -0.01502778 0.04127211) fixed=true
    Marker RTOEmid: calcn_r (0.1421265 -0.01506333 0.006132787) fixed=true
    Marker LHEEproj: calcn_l (-0.02211043 -0.01502778 0.004834423) fixed=true
    Marker LTOEproj: calcn_l (0.1560121 -0.01502778 0.02900654) fixed=true
    Marker LMT5proj: calcn_l (0.1282405 -0.01502778 -0.04127215) fixed=true
    Marker LTOEmid: calcn_l (0.1421263 -0.01506333 -0.006132805) fixed=true
    Marker RAJCproj: talus_r (0 -0.06183565 0) fixed=true
    Marker LAJCproj: talus_l (0 -0.06183569 0) fixed=true
  ContactGeometrySet:
    ContactHalfSpace floor: socket_frame=/ground location=(0 0 0) orientation=(0 0 -1.570796)
    ContactSphere s1_r: socket_frame=/bodyset/calcn_r location=(0.001839852 -0.009677531 -0.003702918) radius=0.0309681
    ContactSphere s2_r: socket_frame=/bodyset/calcn_r location=(0.1436014 -0.009677531 -0.0277875) radius=0.0309681
    ContactSphere s3_r: socket_frame=/bodyset/calcn_r location=(0.1287123 -0.009677531 0.04997114) radius=0.0309681
    ContactSphere s4_r: socket_frame=/bodyset/calcn_r location=(0.06409881 -0.009677531 0.025514) radius=0.0309681
    ContactSphere s5_r: socket_frame=/bodyset/toes_r location=(0.05806519 -0.009677531 -0.01815535) radius=0.0309681
    ContactSphere s6_r: socket_frame=/bodyset/toes_r location=(0.04354889 -0.009677531 0.05986226) radius=0.0309681
    ContactSphere s1_l: socket_frame=/bodyset/calcn_l location=(0.001839852 -0.009677531 0.003702918) radius=0.0309681
    ContactSphere s2_l: socket_frame=/bodyset/calcn_l location=(0.1436014 -0.009677531 0.0277875) radius=0.0309681
    ContactSphere s3_l: socket_frame=/bodyset/calcn_l location=(0.1287123 -0.009677531 -0.04997114) radius=0.0309681
    ContactSphere s4_l: socket_frame=/bodyset/calcn_l location=(0.06409881 -0.009677531 -0.025514) radius=0.0309681
    ContactSphere s5_l: socket_frame=/bodyset/toes_l location=(0.05806519 -0.009677531 0.01815535) radius=0.0309681
    ContactSphere s6_l: socket_frame=/bodyset/toes_l location=(0.04354889 -0.009677531 -0.05986226) radius=0.0309681
